variable                    T equal 300
variable                    R equal 984523

units		                metal
dimension                   3
boundary	                p p p
atom_style	                atomic

lattice                     bcc 3.189
region                      box block 0 16 0 16 0 16
create_box                  1 box
create_atoms                1 box
read_dump                   ../fnn/dump.fnn 20 x y z

pair_style	                tensormd
pair_coeff	                * * ../../../W_k32_snapshot.npz W interp 0.0005 1

mass                        1 183.8

neighbor                    1.0 bin
neigh_modify                every 1 delay 0 check yes

thermo                      1
thermo_style                custom step cpu temp ke pe etotal press vol pxx pyy pzz

velocity                    all create $T $R dist gaussian
fix                         1 all nvt temp $T $T 0.1
dump                        1 all custom 1 dump.interp id type x y z fx fy fz
dump_modify 1 format float "% 20.14f"

run                         1
